*Heading
** Job name: SPT Model name: SPT_Model
** Generated by: Abaqus/CAE 2018
*Preprint, echo=NO, model=NO, history=NO, contact=NO
**
** PARTS
**
*Part, name=Indenter
*End Part
**
*Part, name=LowerDie
*End Part
**
*Part, name=Plate
*Node
      1,          2.5,           0.
      2,          2.5,          0.5
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*Element, type=CAX4
  1,   1,   7, 170, 122
  2,   7,   8, 171, 170
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*Nset, nset=Full_Plate_Set, generate
   1,  781,    1
*Elset, elset=Full_Plate_Set, generate
   1,  700,    1
*Nset, nset=Seed1_Set_(50)
   1,   2,   3,   4,  16,  17
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*Elset, elset=Seed1_Set_(50)
   1,  10,  11,  20,  21,  30
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*Nset, nset=Seed2_Set_(20b)
   1,   2,   5,   6, 123, 124
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*Elset, elset=Seed2_Set_(20b)
 501, 510, 511, 520, 521, 530
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*Nset, nset=Seed3_Set_(10)
   1,   2,   3,   4,   5,   6
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*Elset, elset=Seed3_Set_(10)
   1,   2,   3,   4,   5,   6
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*Elset, elset=_Slave_LowPlate_S4, internal, generate
   1,  491,   10
*Elset, elset=_Slave_LowPlate_S2, internal, generate
 510,  700,   10
*Surface, type=ELEMENT, name=Slave_LowPlate
_Slave_LowPlate_S4, S4
_Slave_LowPlate_S2, S2
*Elset, elset=_Slave_UpPlate_S2, internal, generate
  10,  500,   10
*Elset, elset=_Slave_UpPlate_S4, internal, generate
 501,  691,   10
*Surface, type=ELEMENT, name=Slave_UpPlate
_Slave_UpPlate_S2, S2
_Slave_UpPlate_S4, S4
** Section: MaterialSection
*Solid Section, elset=Full_Plate_Set, material=Mat
,
*End Part
**
*Part, name=UperDie
*End Part
**
**
** ASSEMBLY
**
*Assembly, name=Assembly
**
*Instance, name=Indenter-1, part=Indenter
*Node
      1,   1.20000005,   1.70000005,           0.
*Nset, nset=Indenter-1-RefPt_, internal
1,
*Nset, nset=RefPoint
 1,
*Surface, type=SEGMENTS, name=Master_Indenter
START,          1.2,          1.7
 CIRCL,           0.,          0.5,           0.,          1.7
*Rigid Body, ref node=Indenter-1-RefPt_, analytical surface=Master_Indenter
*End Instance
**
*Instance, name=LowerDie-1, part=LowerDie
*Node
      1,           7.,           0.,           0.
*Nset, nset=LowerDie-1-RefPt_, internal
1,
*Nset, nset=RefPoint
 1,
*Surface, type=SEGMENTS, name=Master_LowDie
START,           2.,         -0.5
 LINE,           2.,         -0.2
 CIRCL,          2.2,           0.,          2.2,         -0.2
 LINE,           7.,           0.
*Rigid Body, ref node=LowerDie-1-RefPt_, analytical surface=Master_LowDie
*End Instance
**
*Instance, name=Plate-1, part=Plate
*End Instance
**
*Instance, name=UperDie-1, part=UperDie
*Node
      1,           7.,          0.5,           0.
*Nset, nset=UperDie-1-RefPt_, internal
1,
*Nset, nset=RefPoint
 1,
*Surface, type=SEGMENTS, name=Master_UpDie
START,           7.,          0.5
 LINE,           2.,          0.5
*Rigid Body, ref node=UperDie-1-RefPt_, analytical surface=Master_UpDie
*End Instance
**
*End Assembly
**
** MATERIALS
**
*Material, name=Mat
*Elastic
200000., 0.33
*Plastic
400.,0.
**
** INTERACTION PROPERTIES
**
*Surface Interaction, name=Friction_Contact
1.,
*Friction, slip tolerance=0.005
 0.1,
**
** BOUNDARY CONDITIONS
**
** Name: Fixed_Lower Type: Symmetry/Antisymmetry/Encastre
*Boundary
LowerDie-1.RefPoint, ENCASTRE
** Name: Hold_Indenter Type: Displacement/Rotation
*Boundary
Indenter-1.RefPoint, 1, 1
Indenter-1.RefPoint, 6, 6
** Name: Hold_Upper Type: Displacement/Rotation
*Boundary
UperDie-1.RefPoint, 1, 1
UperDie-1.RefPoint, 6, 6
**
** INTERACTIONS
**
** Interaction: Ind-Plate_Contact
*Contact Pair, interaction=Friction_Contact, type=SURFACE TO SURFACE
Plate-1.Slave_UpPlate, Indenter-1.Master_Indenter
** Interaction: LowDie-Plate_Contact
*Contact Pair, interaction=Friction_Contact, type=SURFACE TO SURFACE
Plate-1.Slave_LowPlate, LowerDie-1.Master_LowDie
** Interaction: UpDie-Plate_Contact
*Contact Pair, interaction=Friction_Contact, type=SURFACE TO SURFACE
Plate-1.Slave_UpPlate, UperDie-1.Master_UpDie
** ----------------------------------------------------------------
**
** STEP: Clamping
**
*Step, name=Clamping, nlgeom=YES
*Static
1., 1., 1e-05, 1.
**
** BOUNDARY CONDITIONS
** Hold vertical displacement of indenter
*Boundary
Indenter-1.RefPoint,2,2,0
**
** LOADS
**
** Name: Clamping_Load   Type: Concentrated force
*Cload
UperDie-1.RefPoint, 2, -10000.
**
** OUTPUT REQUESTS
**
*Restart, write, frequency=0
**
** FIELD OUTPUT: F-Output-1
**
*Output, field, variable=PRESELECT
**
** HISTORY OUTPUT: H-Output-1
**
*Output, history, variable=PRESELECT
*End Step
** ----------------------------------------------------------------
**
** STEP: Punching
**
*Step, name=Punching, nlgeom=YES, inc=10000
*Static
0.01, 1., 1e-05, 1.
**
** BOUNDARY CONDITIONS
**
** Name: Punch_Displacement Type: Displacement/Rotation
*Boundary
Indenter-1.RefPoint, 2, 2, -2.
**
** OUTPUT REQUESTS
**
*Restart, write, frequency=0
**
** FIELD OUTPUT: F-Output-1
**
*Output, field, variable=PRESELECT
**
** HISTORY OUTPUT: H-Output-1
**
*Output, history, variable=PRESELECT
**
** HISTORY OUTPUT: Reaction_Force
**
*Output, history, time interval=0.02
*Node Output, nset=Indenter-1.RefPoint
RF2, U2
*Node Print, nset=Indenter-1.RefPoint
RF2, U2
*End Step
